*Heading
** Job name: Job-1 Model name: Model-1
** Generated by: Abaqus/CAE Student Edition 6.14-2
*Preprint, echo=NO, model=NO, history=NO, contact=NO
**
** PARTS
**
*Part, name=Part-1
*End Part
**
**
** ASSEMBLY
**
*Assembly, name=Assembly
**
*Instance, name=Part-1-1, part=Part-1
*Node
      1,  -26.1000004,         220.,        4400.
      2,  -26.1000004,         220.,           0.
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*Element, type=S4R
 1,  1, 27, 64,  4
 2, 27, 28, 63, 64
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*Nset, nset=Set-1
   1,   2,   3,   4,   5,   6
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*Elset, elset=Set-1
   1,   2,   3,   4,   5,   6
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*Nset, nset=Set-2
   5,   6,   7,   8,  65,  66
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*Elset, elset=Set-2, generate
 41,  60,   1
*Nset, nset=Set-3
   1,   2,  13,  14,  21,  22
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*Elset, elset=Set-3
 101, 102, 103, 104, 105, 106
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*Nset, nset=Set-4
   7,   8,   9,  10,  11,  12
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*Elset, elset=Set-4
  81,  82,  83,  84,  85,  86
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*Nset, nset=Set-5
   7,   8,   9,  10,  84,  85
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*Elset, elset=Set-5, generate
 61,  80,   1
** Section: T
*Shell Section, elset=Set-1, material=Steel, offset=SNEG
15., 5
** Section: T
*Shell Section, elset=Set-2, material=Steel
15., 5
** Section: Web
*Shell Section, elset=Set-5, material=Steel
3.9, 5
** Section: Flange
*Shell Section, elset=Set-4, material=Steel
5.9, 5
** Section: O
*Shell Section, elset=Set-3, material=Steel
2.3, 5
*End Instance
**
*Nset, nset=Set-1, instance=Part-1-1
   1,   4,   5,   7,   9,  11
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*Elset, elset=Set-1, instance=Part-1-1
   1,  40,  41,  61,  81, 291
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*Elset, elset=_Surf-1_SPOS, internal, instance=Part-1-1, generate
  1,  40,   1
*Elset, elset=_Surf-1_SNEG, internal, instance=Part-1-1, generate
 361,  400,    1
*Surface, type=ELEMENT, name=Surf-1
_Surf-1_SPOS, SPOS
_Surf-1_SNEG, SNEG
*End Assembly
**
** MATERIALS
**
*Material, name=Steel
*Elastic
210000., 0.3
** ----------------------------------------------------------------
**
** STEP: Step-1
**
*Step, name=Step-1, nlgeom=NO
*Static
1., 1., 1e-05, 1.
**
** BOUNDARY CONDITIONS
**
** Name: BC-1 Type: Symmetry/Antisymmetry/Encastre
*Boundary
Set-1, ENCASTRE
**
** LOADS
**
** Name: Load-1   Type: Pressure
*Dsload
Surf-1, P, 0.211039
**
** OUTPUT REQUESTS
**
*Restart, write, frequency=0
**
** FIELD OUTPUT: F-Output-1
**
*Output, field, variable=PRESELECT
**
** HISTORY OUTPUT: H-Output-1
**
*Output, history, variable=PRESELECT
*End Step
